*Heading
** Job name: Job-1 Model name: myHOMIplate
** Generated by: Abaqus/CAE 2017
*Preprint, echo=NO, model=NO, history=NO, contact=NO
**
** PARTS
**
*Part, name=plate
*End Part
**
**
** ASSEMBLY
**
*Assembly, name=Assembly
**
*Instance, name=plate-1, part=plate
*Node
      1,   27.7128124,         44.5
      2,           0.,         28.5
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*Element, type=CPS8
   1,   595,   592,   666,   667,  4257,  4258,  4259,  4260
   2,   605,   607,    46,    45,  4261,  4262,  4263,  4264
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*Nset, nset=All, generate
     1,  12656,      1
*Elset, elset=All, generate
    1,  4145,     1
** Section: Solid
*Solid Section, elset=All, material=LinearElastic
,
*End Instance
**
*Nset, nset=All, instance=plate-1, generate
     1,  12656,      1
*Elset, elset=All, instance=plate-1, generate
    1,  4145,     1
*Nset, nset=Bottom, instance=plate-1
     3,     4,    81,    82,    83,    84
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*Elset, elset=Bottom, instance=plate-1
   78,   79,   80,   82,  102,  104
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*Nset, nset=RightBottom, instance=plate-1
 4,
*Nset, nset=Top, instance=plate-1
     5,     6,   159,   160,   161,   162
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*Elset, elset=Top, instance=plate-1
  233,  234,  250,  266,  267,  281
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*Nset, nset=crackFront, instance=plate-1
 7,
*Nset, nset=crackPlaneCoarse, instance=plate-1
     1,     2,    31,    32,    33,    34
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*Elset, elset=crackPlaneCoarse, instance=plate-1
    2,   12,   13,   14,   15,   66
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*Nset, nset=crackPlaneRefined, instance=plate-1
     1,     7,   223,   224,   225,  4215
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*Elset, elset=crackPlaneRefined, instance=plate-1
 4050, 4051, 4052, 4119, 4120, 4121, 4122, 4145
*Nset, nset=crackRefined, instance=plate-1
    1,    8,    9,   10,   11,   12
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*Elset, elset=crackRefined, instance=plate-1
   18,   19,   20,   62,   67,  471
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*End Assembly
**
** MATERIALS
**
*Material, name=LinearElastic
*Elastic
280., 0.45
** ----------------------------------------------------------------
**
** STEP: ApplyLoad
**
*Step, name=ApplyLoad, nlgeom=NO
*Static
1., 1., 1e-05, 1.
**
** BOUNDARY CONDITIONS
**
** Name: bottomFixed Type: Displacement/Rotation
*Boundary
Bottom, 2, 2
** Name: load Type: Displacement/Rotation
*Boundary
Top, 2, 2, 1.4
** Name: rightFixed Type: Displacement/Rotation
*Boundary
RightBottom, 1, 1
**
** OUTPUT REQUESTS
**
*Restart, write, frequency=0
**
** FIELD OUTPUT: F-Output-1
**
*Output, field
*Node Output
RF, U
*Element Output, directions=YES
E, S
*Output, history, frequency=0
*FILE FORMAT, ASCII
*NODE FILE
 U
**
** HISTORY OUTPUT: J-int
**
*Contour Integral, crack name=J-int_Crack-1, contours=5, crack tip nodes
crackFront, crackFront, 0.866025, 0.5, 0.
**
** HISTORY OUTPUT: SIF
**
*Contour Integral, crack name=SIF_Crack-1, contours=5, crack tip nodes, type=K FACTORS
crackFront, crackFront, 0.866025, 0.5, 0.
*End Step
