*Heading
** Job name: Job-1 Model name: myFGMIIplate
** Generated by: Abaqus/CAE 2017
*Preprint, echo=NO, model=NO, history=NO, contact=NO
**
** PARTS
**
*Part, name=plate
*End Part
**
**
** ASSEMBLY
**
*Assembly, name=Assembly
**
*Instance, name=plate-1, part=plate
20.4833395016046,           0.,           0.
*Node
      1,   21.6506348,         44.5
      2,           0.,          32.
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*Element, type=CPS8
   1,   570,   568,   628,   629,  3776,  3777,  3778,  3779
   2,   220,   783,  3145,   716,  3780,  3781,  3782,  3783
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*Nset, nset=All, generate
     1,  11222,      1
*Elset, elset=All, generate
    1,  3673,     1
** Section: Solid
*Solid Section, elset=All, material=GradedLinearElastic
,
*End Instance
**
*Nset, nset=All, instance=plate-1, generate
     1,  11222,      1
*Elset, elset=All, instance=plate-1, generate
    1,  3673,     1
*Nset, nset=Bottom, instance=plate-1
    3,    4,   74,   75,   76,   77
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*Elset, elset=Bottom, instance=plate-1
   44,   46,   68,   79,   90,   91
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*Nset, nset=RightBottom, instance=plate-1
 4,
*Nset, nset=Top, instance=plate-1
    5,    6,  152,  153,  154,  155
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*Elset, elset=Top, instance=plate-1
  123,  125,  158,  181,  204,  227
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*Nset, nset=crackFront, instance=plate-1
 7,
*Nset, nset=crackPlaneCoarse, instance=plate-1
    1,    2,   31,   32,   33,   34
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*Elset, elset=crackPlaneCoarse, instance=plate-1
   12,   13,   15,   16,   17,   31
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*Nset, nset=crackPlaneRefined, instance=plate-1
     1,     7,   214,   215,   216,  3743
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*Elset, elset=crackPlaneRefined, instance=plate-1
 3578, 3579, 3580, 3647, 3648, 3649, 3650, 3673
*Nset, nset=crackRefined, instance=plate-1
    1,    8,    9,   10,   11,   12
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*Elset, elset=crackRefined, instance=plate-1
   19,   20,   22,   24,   25,   26
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*End Assembly
**
** MATERIALS
**
*Material, name=GradedLinearElastic
*Elastic, dependencies=1
   0.1,  0.45, ,   0.1
 1e+06,  0.45, , 1e+06
*User Defined Field
*INITIAL CONDITIONS, TYPE=FIELD, VARIABLE=1
All, 100
** ----------------------------------------------------------------
**
** STEP: ApplyLoad
**
*Step, name=ApplyLoad, nlgeom=NO
*Static
1., 1., 1e-05, 1.
**
** BOUNDARY CONDITIONS
**
** Name: BTM Type: Displacement/Rotation
*Boundary
Bottom, 2, 2
** Name: Right Type: Displacement/Rotation
*Boundary
RightBottom, 1, 1
** Name: load Type: Displacement/Rotation
*Boundary
Top, 2, 2, 0.95
*FIELD, USER
All,
**
** OUTPUT REQUESTS
**
*Restart, write, frequency=0
**
** FIELD OUTPUT: F-Output-1
**
*Output, field
*Node Output
RF, U
*Element Output, directions=YES
E, S
*Output, history, frequency=0
*FILE FORMAT, ASCII
*NODE FILE
 U
**
** HISTORY OUTPUT: J-int
**
*Contour Integral, crack name=J-int_Crack-1, contours=5, crack tip nodes
crackFront, crackFront, 0.866025, 0.5, 0.
**
** HISTORY OUTPUT: SIF
**
*Contour Integral, crack name=SIF_Crack-1, contours=5, crack tip nodes, type=K FACTORS
crackFront, crackFront, 0.866025, 0.5, 0.
*End Step
